// COMSOL Multiphysics 6.0.0.318 model "Untitled.mph"
// Outline of the model tree

Geometry
  geom1 "几何 1" (3D, length unit m)
    blk1: Block "桌子" | size = {1, 1, 0.1}
    blk2: Block "尺子" | pos = {0.5, 1, 0.11}; base = center; size = {0.2, 0.8, 0.02}
    sph1: Sphere "球体 1" | pos = {0.5, 1.2, 1.5}; r = 0.03
    fin: Finalize "形成联合体"

Materials
  mat1: Common "Air"
    def "Basic"
      thermalexpansioncoefficient = alpha_p(pA,T)
      molarmass = 0.02897[kg/mol]
      bulkviscosity = muB(T)
      relpermeability = 1
      relpermittivity = 1
      dynamicviscosity = eta(T)
      ratioofspecificheat = 1.4
      electricconductivity = 0[S/m]
      heatcapacity = Cp(T)
      density = rho(pA,T)
      thermalconductivity = k(T)
      soundspeed = cs(T)
      eta: Piecewise | arg = T; pieces = {200.0, 1600.0, -8.38278E-7+8.35717342E-8*T^1-7.69429583E-11*T^2+4.6437266E-14*T^3-1.06585607E-17*T^4}; argunit = K; fununit = Pa*s
      Cp: Piecewise | arg = T; pieces = {200.0, 1600.0, 1047.63657-0.372589265*T^1+9.45304214E-4*T^2-6.02409443E-7*T^3+1.2858961E-10*T^4}; argunit = K; fununit = J/(kg*K)
      rho: Analytic | expr = pA*0.02897/R_const[K*mol/J]/T; args = {pA, T}; fununit = kg/m^3; argunit = {Pa, K}
      k: Piecewise | arg = T; pieces = {200.0, 1600.0, -0.00227583562+1.15480022E-4*T^1-7.90252856E-8*T^2+4.11702505E-11*T^3-7.43864331E-15*T^4}; argunit = K; fununit = W/(m*K)
      cs: Analytic | expr = sqrt(1.4*R_const[K*mol/J]/0.02897*T); args = T; fununit = m/s; argunit = K
      an1: Analytic | funcname = alpha_p; expr = -1/rho(pA,T)*d(rho(pA,T),T); args = {pA, T}; fununit = 1/K; argunit = {Pa, K}
      an2: Analytic "Analytic 2a" | funcname = muB; expr = 0.6*eta(T); args = T; fununit = Pa*s; argunit = K
    RefractiveIndex
      n = 1
      ki = 0
    NonlinearModel
      BA = (def.gamma+1)/2
    idealGas
      Rs = R_const/Mn
      heatcapacity = Cp(T)
      ratioofspecificheat = 1.4
      molarmass = 0.02897
      Cp: Piecewise | arg = T; pieces = {200.0, 1600.0, 1047.63657-0.372589265*T^1+9.45304214E-4*T^2-6.02409443E-7*T^3+1.2858961E-10*T^4}; argunit = K; fununit = J/(kg*K)
  mat2: Common "Iron" on domains 2
    def "Basic"
      relpermeability = 4000
      electricconductivity = 1.12e7[S/m]
      thermalexpansioncoefficient = 12.2e-6[1/K]
      heatcapacity = 440[J/(kg*K)]
      relpermittivity = 1
      density = 7870[kg/m^3]
      thermalconductivity = 76.2[W/(m*K)]
    Enu "Young's modulus and Poisson's ratio"
      E = 200e9[Pa]
      nu = 0.29
  mat3: Common "Wood (pine)" on domains 1
    def "Basic"
      density = 532
      heatcapacity = 2700
      thermalconductivity = k(phi)
      diffusion = Dw(phi)
      watercontent = wc(phi)
      vaporpermeability = delta_p(phi)
      vaporresistancefactor = mu_vrf(T,pA,phi)
      int1: Interpolation "wc" | funcname = wc; table = {{0, 0}, {0.55, 45}, {0.75, 80}, {0.97, 185}, {1, 870}}; interp = piecewisecubic; fununit = kg/m^3; argunit = 1
      int2: Interpolation "Dw" | funcname = Dw; table = {{0, 1.32e-13}, {0.65, 1.32e-13}, {1, 8.03e-11}}; interp = piecewisecubic; fununit = m^2/s; argunit = 1
      an1: Analytic "delta_p" | funcname = delta_p; expr = max(7e-13*exp(2.84*phi),0); args = phi; fununit = s; argunit = 1
      int3: Interpolation "k" | funcname = k; table = {{0, 0.1}, {0.97, 0.15}, {1, 0.6}}; interp = piecewisecubic; fununit = W/(m*K); argunit = 1
      an2: Analytic "mu_vrf" | funcname = mu_vrf; expr = max(2.01E-7*T^0.81/p/delta_p(phi),0); args = {T, p, phi}; fununit = 1; argunit = {K, Pa, 1}

Physics
  mbd: MultibodyDynamics "多体动力学" on all domains
    dependent variable u = {u, v, w}
    lemm1: LinearElasticModel "线弹性材料 1" (default)
    free1: Free "自由 1" (default)
    init1: init "初始值 1" (default)
    gr1: Gravity "重力 1" on domains 2, 3
  solid: SolidMechanics "固体力学" on all domains
    dependent variable u2 = {u2, v2, w2}
    lemm1: LinearElasticModel "线弹性材料 1" (default)
    free1: Free "自由 1" (default)
    init1: init "初始值 1" (default)
    fix1: Fixed "固定约束 1" on boundaries 1-5, 21

Mesh
  mesh1 "网格 1" (physics-controlled)

Studies
  std1 "研究 1"
    time: Transient "瞬态" | tlist = range(0,0.1,1); solve for = {mbd}

Solver configurations
  sol1 "解 1" (study std1)

Datasets
  dset1: Solution | solution = sol1

Plots
  pg1: PlotGroup3D "应力 (solid)" | data = dset1
    vol1: Volume "体 1" | expr = solid.mises
      def: Deform "变形" | expr = {u2, v2, w2}; descr = 位移场
  pg2: PlotGroup3D "体积载荷 (solid)" | data = dset1
    arwv1: ArrowVolume "重力 1" | expr = {solid.gr1.F_Vx, solid.gr1.F_Vy, solid.gr1.F_Vz}
      col: Color "颜色表达式" | expr = solid.gr1.F_V_Mag
      def: Deform "变形" | expr = {u2, v2, w2}; descr = 位移场
    surf1: Surface "灰色表面" | expr = 1
      def: Deform "变形" | expr = {u2, v2, w2}; descr = 位移场
      sel1: Selection "选择 1" on boundaries 1-21
      tran1: Transparency "透明 1" | transparency = 0.8