// COMSOL Multiphysics 6.0.0.318 model "learn1_2d.mph"
// Outline of the model tree

Parameters
  L = 160[m]
  W = 10[m]

Geometry
  geom1 "几何 1" (2D, length unit m)
    r1: Rectangle "矩形 1" | size = {L, W}
    fin: Finalize "形成联合体"

Materials
  mat1: Common "材料 1" on all domains
    def "基本"
      density = 7850
    Enu "杨氏模量和泊松比"
      E = 2.1E11
      nu = 0.3

Physics
  solid: SolidMechanics "固体力学" on all domains
    dependent variable u = {u, v, w}
    lemm1: LinearElasticModel "线弹性材料 1" (default)
    free1: Free "自由 1" (default)
    init1: init "初始值 1" (default)
    fix1: Fixed "固定约束 1" on boundaries 1
    bndl1: BoundaryLoad "边界载荷 1" on boundaries 3
      LoadType = ForceLength
      FperArea = {0, -11000[N]/x, 0}
      FperLength = {0, -11000[N]/x, 0}
      coordinateSystem = GlobalSystem

Mesh
  mesh1 "网格 1"
    size: MeshSizeDefault "大小" | hauto = 1
    map1: Map "映射 1" on domains 1

Studies
  std1 "研究 1"
    stat: Stationary "稳态"

Solver configurations
  sol1 "解 1" (study std1)
    v1: Variables "因变量 1"
    s1: Stationary "稳态求解器 1"
      dDef: Direct "直接"
      fc1: FullyCoupled "全耦合 1" | linsolver = dDef

Datasets
  dset1: Solution | solution = sol1

Plots
  pg1: PlotGroup2D "应力 (solid)" | data = dset1
    surf1: Surface "表面 1" | expr = solid.mises
      def: Deform "变形" | expr = {u, v}; descr = 位移场
  pg2: PlotGroup2D "边界载荷 (solid)" | data = dset1
    arwl1: ArrowLine "边界载荷 1" | expr = {solid.bndl1.F_Ax, solid.bndl1.F_Ay}
      col: Color "颜色表达式" | expr = solid.bndl1.F_A_Mag
      def: Deform "变形" | expr = {u, v}; descr = 位移场
    surf1: Surface "灰色表面" | expr = 1
      def: Deform "变形" | expr = {u, v}; descr = 位移场
      sel1: Selection "选择 1" on domains 1
  pg3: PlotGroup2D "应变" | data = dset1
    surf1: Surface "表面 1" | expr = solid.ep1
  pg4: PlotGroup1D "X方向应力变化图" | data = dset1
    lngr1: LineGraph "线结果图 1" on boundaries 2 | expr = solid.disp