// COMSOL Multiphysics 6.0.0.318 model "无纸张v0.0.2.mph"
// Outline of the model tree

Pairs
  ap1: Contact "接触对 1" | source: boundaries 4; destination: boundaries 9

Geometry
  geom1 "几何 1" (3D, length unit m)
    blk1: Block "桌子" | size = {1, 1, 0.1}
    blk2: Block "尺子" | pos = {0.975, 0.5, 0.1005}; base = center; size = {0.2, 0.02, 0.001}
    fin: Finalize "形成装配" | action = assembly; pairtype = contact

Materials
  mat1: Common "Iron [solid,annealed]" on domains 1, 2
    def "基本"
      thermalconductivity = k_solid_annealed_1(T)
      resistivity = res_solid_annealed_1(T)
      thermalexpansioncoefficient = (alpha_solid_1(T)+(Tempref-293[K])*if(abs(T-Tempref)>1e-3,(alpha_solid_1(T)-alpha_solid_1(Tempref))/(T-Tempref),d(alpha_solid_1(T),T)))/(1+alpha_solid_1(Tempref)*(Tempref-293[K]))
      heatcapacity = C_solid_1(T)
      electricconductivity = sigma_solid_annealed_1(T)
      HC = HC_solid_1(T)
      VP = VP_solid_1(T)
      density = rho_solid_1(T)
      TD = TD_solid_annealed_1(T)
      k_solid_annealed_1: Piecewise
        arg = T
        pieces = 
          {0.0, 19.5, 0.315246161+170.312973*T^1+0.0174830979*T^2+0.142324863*T^3-0.0626155816*T^4+0.003067511*T^5-4.39084371E-5*T^6}
          {19.5, 68.5, 184.866521+335.611299*T^1-23.9944307*T^2+0.720279125*T^3-0.0111496216*T^4+8.77810427E-5*T^5-2.785866E-7*T^6}
          {68.5, 130.0, 2219.57996-75.4471471*T^1+1.14982008*T^2-0.00941690491*T^3+4.31850995E-5*T^4-1.04392639E-7*T^5+1.03371424E-10*T^6}
          {130.0, 1073.0, 186.996288-0.940979035*T^1+0.00372781142*T^2-8.68225821E-6*T^3+1.11900542E-8*T^4-7.41549439E-12*T^5+1.96597473E-15*T^6}
          {1073.0, 1183.0, -1208.04374+3.31698236*T^1-0.00296363936*T^2+8.82845065E-7*T^3}
          {1183.0, 1810.0, -65.20676+0.162855668*T^1-9.29194277E-5*T^2+1.84536311E-8*T^3}
        argunit = K
        fununit = W/(m*K)
      res_solid_annealed_1: Piecewise
        arg = T
        pieces = 
          {100.0, 1100.0, 1.408983E-8+8.537916E-12*T^1+8.678851E-13*T^2}
          {1100.0, 1500.0, -3.863736E-6+1.016878E-8*T^1-6.951621E-12*T^2+1.625296E-15*T^3}
        argunit = K
        fununit = ohm*m
      alpha_solid_1: Piecewise | arg = T; pieces = {0.0, 960.0, 6.78762E-6+2.878178E-8*T^1-7.594277E-11*T^2+1.43191E-13*T^3-1.357067E-16*T^4+4.830576E-20*T^5}; argunit = K; fununit = 1/K
      C_solid_1: Piecewise
        arg = T
        pieces = 
          {1.0, 20.0, 0.0164077652+0.0734379027*T^1+0.00354351328*T^2+3.43411423E-5*T^3+8.78682677E-6*T^4}
          {20.0, 130.0, -4.12996699+0.900549934*T^1-0.0558817132*T^2+0.00197232379*T^3-1.8078495E-5*T^4+5.25176517E-8*T^5}
          {130.0, 500.0, -143.811779+5.19120595*T^1-0.0178093048*T^2+2.86828262E-5*T^3-1.68314078E-8*T^4}
          {500.0, 1000.0, 3998.51031-21.8908093*T^1+0.050237037*T^2-4.9900476E-5*T^3+1.85286976E-8*T^4}
          {1000.0, 1042.0, -560642.611+1783.88815*T^1-1.88950988*T^2+6.67236706E-4*T^3}
          {1042.0, 1184.0, 5927267.78-20371.737*T^1+26.2589723*T^2-0.0150426432*T^3+3.23124797E-6*T^4}
          {1184.0, 1665.0, 429.530277+0.149681052*T^1}
          {1665.0, 1809.0, 440.284412+0.177820042*T^1}
        argunit = K
        fununit = J/(kg*K)
      sigma_solid_annealed_1: Piecewise
        arg = T
        pieces = 
          {100.0, 1100.0, 1/(8.678851E-13*T^2+8.537916E-12*T+1.408983E-08)}
          {1100.0, 1500.0, 1/(1.625296E-15*T^3-6.951621E-12*T^2+1.016878E-08*T-3.863736E-06)}
        argunit = K
        fununit = S/m
      HC_solid_1: Piecewise
        arg = T
        pieces = 
          {1.0, 20.0, 9.16324451E-4+0.00410128567*T^1+1.97894581E-4*T^2+1.91784979E-6*T^3+4.9071793E-7*T^4}
          {20.0, 130.0, -0.230646264+0.0502930189*T^1-0.00312082719*T^2+1.10148361E-4*T^3-1.00962974E-6*T^4+2.93295346E-9*T^5}
          {130.0, 500.0, -8.03145578+0.289913377*T^1-9.94596213E-4*T^2+1.60184984E-6*T^3-9.39983716E-10*T^4}
          {500.0, 1000.0, 223.304808-1.22253593*T^1+0.00280558873*T^2-2.78679086E-6*T^3+1.03477224E-9*T^4}
          {1000.0, 1042.0, -31310.2151+99.6248056*T^1-0.105523451*T^2+3.72631768E-5*T^3}
          {1042.0, 1184.0, 331020.214-1137.70031*T^1+1.46648489*T^2-8.40086532E-4*T^3+1.80455502E-7*T^4}
          {1184.0, 1665.0, 23.9879766+0.0083592387*T^1}
          {1665.0, 1809.0, 24.5885521+0.00993071563*T^1}
        argunit = K
        fununit = J/(mol*K)
      VP_solid_1: Piecewise | arg = T; pieces = {293.0, 1811.0, exp(-17614.3363+10536.2897*T^1-2589.08822*T^2+325.505694*T^3-20.8402582*T^4+0.541360823*T^5)}; argunit = K; fununit = Pa
      rho_solid_1: Piecewise
        arg = T
        pieces = 
          {0.0, 30.0, 7906.743}
          {30.0, 53.0, 7905.632+0.06730164*T^1-0.001025121*T^2+4.962534E-7*T^3+1.383301E-9*T^4}
          {53.0, 190.0, 7924.0-0.4306436*T^1+0.002196832*T^2-6.010914E-6*T^3}
          {190.0, 960.0, 7910.967-0.100271*T^1-3.511597E-4*T^2+1.470685E-7*T^3}
        argunit = K
        fununit = kg/m^3
      TD_solid_annealed_1: Piecewise
        arg = T
        pieces = 
          {1.0, 10.0, 0.173811659+0.079359873*T^1-0.0350641691*T^2+0.00757262338*T^3-9.33508493E-4*T^4+6.03940568E-5*T^5-1.58525494E-6*T^6}
          {10.0, 35.0, 0.194272536+0.0211306697*T^1-0.00461837647*T^2+2.7664872E-4*T^3-7.74941592E-6*T^4+1.04566195E-7*T^5-5.41559074E-10*T^6}
          {35.0, 68.0, 0.163839147-0.012426311*T^1+3.84062806E-4*T^2-5.99652814E-6*T^3+4.70665762E-8*T^4-1.48108145E-10*T^5}
          {68.0, 97.0, 0.0949833321-0.00629036181*T^1+1.75421376E-4*T^2-2.62218136E-6*T^3+2.2093919E-8*T^4-9.93162697E-11*T^5+1.85869575E-13*T^6}
          {97.0, 240.0, 0.0012809311-3.40248137E-5*T^1+3.94100445E-7*T^2-2.44914858E-9*T^3+8.54851271E-12*T^4-1.58594447E-14*T^5+1.22190927E-17*T^6}
          {240.0, 560.0, 7.58309207E-5-2.37466822E-7*T^1-8.95394382E-10*T^2+8.59086944E-12*T^3-2.43711669E-14*T^4+3.07705962E-17*T^5-1.47575987E-20*T^6}
          {560.0, 960.0, -1.86850388E-4+1.61626996E-6*T^1-5.09043937E-9*T^2+8.16148789E-12*T^3-7.12206576E-15*T^4+3.2060583E-18*T^5-5.80084082E-22*T^6}
        argunit = K
        fununit = m^2/s
    ThermalExpansion "热膨胀"
      alphatan = CTE(T)
      dL = (dL_solid_1(T)-dL_solid_1(Tempref))/(1+dL_solid_1(Tempref))
      dL_solid_1: Piecewise
        arg = T
        pieces = 
          {0.0, 30.0, -0.001971436}
          {30.0, 110.0, -0.001910556-3.518812E-6*T^1+5.140443E-8*T^2-5.849422E-11*T^3}
          {110.0, 215.0, -0.002967233+1.81617E-5*T^1-9.276156E-8*T^2+2.54081E-10*T^3}
          {215.0, 960.0, -0.00234185521+4.083948E-6*T^1+1.512293E-8*T^2-6.083782E-12*T^3}
        argunit = K
      CTE: Piecewise
        arg = T
        pieces = 
          {91.0, 400.0, -3.482149E-6+1.265098E-7*T^1-3.745646E-10*T^2+4.692131E-13*T^3-1.879297E-16*T^4}
          {400.0, 550.0, 3.718357E-5-1.761777E-7*T^1+3.878031E-10*T^2-2.554622E-13*T^3}
          {550.0, 960.0, -7.251939E-6+6.376279E-8*T^1-4.206483E-11*T^2}
        argunit = K
        fununit = 1/K
    Enu "杨氏模量和泊松比"
      E = E(T)
      nu = nu(T)
      E: Piecewise
        arg = T
        pieces = 
          {4.0, 273.0, 2.217366E11+5020008.0*T^1-305140.4*T^2+926.6601*T^3-1.145454*T^4}
          {273.0, 1050.0, 2.109875E11+3.572844E7*T^1-106319.6*T^2}
          {1050.0, 1500.0, 2.024261E11-6.77381E7*T^1}
        argunit = K
        fununit = Pa
      nu: Piecewise
        arg = T
        pieces = 
          {4.0, 120.0, 0.2850355-1.662951E-6*T^1}
          {120.0, 273.0, 0.2848011-7.147353E-6*T^1+6.558945E-8*T^2}
          {273.0, 1053.0, 0.2712267+7.030261E-5*T^1-3.856929E-8*T^2+1.246582E-11*T^3}
          {1053.0, 1500.0, 0.3165268-1.242823E-6*T^1+1.661461E-9*T^2}
        argunit = K
    KG "体积模量和剪切模量"
      K = kappa(T)
      G = mu(T)
      mu: Piecewise
        arg = T
        pieces = 
          {4.0, 273.0, 8.626526E10+1636497.0*T^1-108981.6*T^2+291.1261*T^3-0.3377859*T^4}
          {273.0, 1050.0, 8.301552E10+9184755.0*T^1-38834.5*T^2}
          {1050.0, 1500.0, 7.694034E10-2.580357E7*T^1}
        argunit = K
        fununit = Pa
      kappa: Piecewise
        arg = T
        pieces = 
          {4.0, 100.0, 1.800573E11-3478717.0*T^1+151512.1*T^2-5485.327*T^3+28.28329*T^4}
          {100.0, 273.0, 1.818111E11-4.023792E7*T^1+84204.68*T^2-93.09453*T^3}
          {273.0, 1500.0, 1.842649E11-2.509462E7*T^1-28588.37*T^2}
        argunit = K
        fununit = Pa

Physics
  solid: SolidMechanics "固体力学" on all domains
    dependent variable u = {u, v, w}
    lemm1: LinearElasticModel "线弹性材料 1" (default)
    free1: Free "自由 1" (default)
    init1: init "初始值 1" (default)
    dcnt1: SolidContact "接触 1" (default)
    gr1: Gravity "重力 1" on domains 2

Mesh
  mesh1 "网格 1" (physics-controlled)

Studies
  std1 "研究 1"
    time: Transient "瞬态" | tlist = range(0,0.1,1)

Solver configurations
  sol1 "解 1" (study std1)
    v1: Variables "因变量 1"
      comp1_u: Field "位移场 (comp1.u)" | scalemethod = manual; scaleval = 1e-2*1.47167455642
    t1: Time "瞬态求解器 1" | tlist = range(0,0.1,1); rtol = 0.001; timemethod = genalpha; predictor = constant
      fc1: FullyCoupled "全耦合 1" | linsolver = d1; dtech = auto; minstep = 0.5; useminsteprecovery = on; maxiter = 4
      d1: Direct "建议的直接求解器 (solid)" | linsolver = pardiso; pivotperturb = 1.0E-9; nliniterrefine = on

Datasets
  dset1: Solution | solution = sol1