// COMSOL Multiphysics 6.0.0.318 model "无纸张v0.1.1.mph"
// Outline of the model tree

Parameters
  a = 1

Pairs
  p1: Contact "接触对 1" | source: boundaries 3; destination: boundaries 6
  p2: Contact "接触对 2" | source: boundaries 9-12; destination: boundaries 7

Geometry
  geom1 "几何 1" (2D, length unit m)
    r1: Rectangle "桌子" | size = {1, 0.1}
    r2: Rectangle "尺子" | pos = {0.875, 0.1}; size = {0.2, 0.001}
    c1: Circle "圆 1" | pos = {1.07, 0.111}; r = 0.01
    fin: Finalize "形成装配" | action = assembly; createpairs = off; pairtype = contact

Materials
  mat1: Common "Iron" on domains 1-3
    def "Basic"
      relpermeability = 4000
      electricconductivity = 1.12e7[S/m]
      thermalexpansioncoefficient = 12.2e-6[1/K]
      heatcapacity = 440[J/(kg*K)]
      relpermittivity = 1
      density = 7870[kg/m^3]
      thermalconductivity = 76.2[W/(m*K)]
    Enu "Young's modulus and Poisson's ratio"
      E = 200e9[Pa]
      nu = 0.29

Physics
  solid: SolidMechanics "固体力学" on all domains
    dependent variable u = {u, v, w}
    lemm1: LinearElasticModel "线弹性材料 1" (default)
    free1: Free "自由 1" (default)
    init1: init "初始值 1" (default)
    dcnt1: SolidContact "接触 0" (default) | pairDisconnect = 1
    cnt2: SolidContact "接触1" on all boundaries | ContactMethodCtrl = PenaltyDynamic; pairs = p1
      fric1: Friction "摩擦 1" on all boundaries | mu_fric = 0.01
    cnt1: SolidContact "接触 2" on all boundaries | ContactMethodCtrl = Penalty; pairs = p2
      fric1: Friction "摩擦 1" on all boundaries | mu_fric = 0.05
    fix1: Fixed "固定约束 1" on domains 1
    gr1: Gravity "重力 1" on domains 2, 3

Mesh
  mesh1 "网格 1"
    size: MeshSizeDefault "大小" | hauto = 1
    ftri1: FreeTri "自由三角形网格 1" on domains 2
      size1: Size "大小 1" on domains 2 | hmax = 0.0724
    map1: Map "映射 1" on domains 3
      dis1: Distribution "分布 1" on boundaries 9-12 | numelem = 2
    ftri2: FreeTri "自由三角形网格 2" on remaining entities

Studies
  std1 "研究 1"
    time: Transient "瞬态" | tlist = range(0,0.1,1)

Solver configurations
  sol1 "解 1" (study std1)
    v1: Variables "因变量 1"
      comp1_u: Field "位移场 (comp1.u)" | scalemethod = manual; scaleval = 1e-2*1.08178833419
    t1: Time "瞬态求解器 1" | tlist = range(0,0.1,1); rtol = 0.001; timemethod = genalpha; predictor = constant
      dDef: Direct "直接"
      se1: Segregated "分离 1" | maxsegiter = 15
        ss1: SegregatedStep "固体力学"
          segvar = {comp1_u}
          linsolver = dDef
          subdtech = auto
          subiter = 7
          usesubminsteprecovery = on
          subtermauto = itertol
          subminstep = 0.5
          subntolfact = 1
        ls1: LumpedStep "集总步骤 1"

Datasets
  dset1: Solution | solution = sol1

Plots
  pg1: PlotGroup2D "应力 (solid)" | data = dset1
    surf1: Surface "表面 1" | expr = solid.mises
      def: Deform "变形" | expr = {u, v}; descr = 位移场
  pg2: PlotGroup2D "接触力 (solid)" | data = dset1
    arwl1: ArrowLine "接触1, 压力" | expr = {solid.cnt2.Tnx, solid.cnt2.Tny}; gporder = 4
      col: Color "颜色表达式" | expr = comp1.solid.cnt2.Tn
      def: Deform "变形" | expr = {u, v}; descr = 位移场
    arwl2: ArrowLine "接触 2, 压力" | expr = {solid.cnt1.Tnx, solid.cnt1.Tny}; gporder = 4
      col: Color "颜色表达式" | expr = comp1.solid.cnt1.Tn
      def: Deform "变形" | expr = {u, v}; descr = 位移场
    arwl3: ArrowLine "接触 2, 摩擦力" | expr = {solid.cnt1.Ttx, solid.cnt1.Tty}; gporder = 4
      col: Color "颜色表达式" | expr = comp1.solid.cnt1.Ttnorm
      def: Deform "变形" | expr = {u, v}; descr = 位移场
    surf1: Surface "灰色表面" | expr = 1
      def: Deform "变形" | expr = {u, v}; descr = 位移场
      sel1: Selection "选择 1" on domains 1-3
  pg3: PlotGroup2D "体积载荷 (solid)" | data = dset1
    arws1: ArrowSurface "重力 1" | expr = {solid.gr1.F_Vx, solid.gr1.F_Vy}
      col: Color "颜色表达式" | expr = solid.gr1.F_V_Mag
      def: Deform "变形" | expr = {u, v}; descr = 位移场
    surf1: Surface "灰色表面" | expr = 1
      def: Deform "变形" | expr = {u, v}; descr = 位移场
      sel1: Selection "选择 1" on domains 1-3

Exports
  anim1: Animation "动画 1"
    movietype = avi
    avifilename = D:\document\for myself\2024.2-2024.6\pt\NP V=0.avi
    framesel = all
    maxframes = 11
    width = 1920
    height = 1080